# OpenSim document version 30000
AnalyzeTool mrsdeviceopt_subject02_walk2_ik_solution:
  model_file: C:\Users\Nick\repos\optctrlmuscle\Data\SamEdith\subject02\subject02_18musc.osim
  replace_force_set: false
  results_directory: C:\Users\Nick\repos\optctrlmuscle\Examples\AgingTendon\Results\MuscleAnalysis
  output_precision: 8
  initial_time: 0.516
  final_time: 1.96
  solve_for_equilibrium_for_auxiliary_states: false
  maximum_number_of_integrator_steps: 20000
  maximum_integrator_step_size: 1
  minimum_integrator_step_size: 1e-8
  integrator_error_tolerance: 1e-5
  coordinates_file: C:\Users\Nick\repos\optctrlmuscle\Data\SamEdith\subject02\mrsdeviceopt_subject02_walk2_ik_solution.mot
  lowpass_cutoff_frequency_for_coordinates: -1
  AnalysisSet Analyses:
    MuscleAnalysis: start_time=0 end_time=10 step_interval=1 in_degrees=true muscle_list=all
        moment_arm_coordinate_list=all compute_moments=true
