# OpenSim document version 30000
AnalyzeTool subject02_running_RRA_Kinematics_q:
  model_file: C:\Users\Rachel\Documents\2017 Spring\ME 485\optcntrlmuscle\optctrlmuscle\Examples\ISB2017\HOBL\subject02_running_RRA_cycle02_07_v2_18muscle.osim
  replace_force_set: false
  results_directory: C:\Users\Rachel\Documents\2017 Spring\ME 485\optcntrlmuscle\optctrlmuscle\Examples\ISB2017\HOBL\Results\MuscleAnalysis
  output_precision: 8
  initial_time: 0.7
  final_time: 1.41
  solve_for_equilibrium_for_auxiliary_states: false
  maximum_number_of_integrator_steps: 20000
  maximum_integrator_step_size: 1
  minimum_integrator_step_size: 1e-8
  integrator_error_tolerance: 1e-5
  coordinates_file: C:\Users\Rachel\Documents\2017 Spring\ME 485\optcntrlmuscle\optctrlmuscle\Examples\ISB2017\HOBL\subject02_running_RRA_Kinematics_q.mot
  lowpass_cutoff_frequency_for_coordinates: -1
  AnalysisSet Analyses:
    MuscleAnalysis: start_time=0 end_time=10 step_interval=1 in_degrees=true muscle_list=all
        moment_arm_coordinate_list=all compute_moments=true
