# OpenSim document version 30000
Model subject02_RRA_adjusted:
  length_units: meters
  force_units: N
  gravity: 0 -9.80665 0
  credits:
    Delp S.L., Loan J.P., Hoy M.G., Zajac F.E., Topp E.L., Rosen J.M., Thelen D.G., Anderson F.C., Seth A., Hamner S.R.
  publications:
    Notes: 3D, 23 DOF gait model created by D.G. Thelen, Univ. of Wisconsin-Madison, and Ajay Seth, Frank C. Anderson, and Scott L. Delp, Stanford University. Lower extremity joint defintions based on Delp et al. (1990). Low back joint and anthropometry based on Anderson and Pandy (1999, 2001). Planar knee model of Yamaguchi and Zajac (1989). Seth removed the patella to avoid kinematic constraints; insertions of the quadrucepts are handled with moving points in the tibia frame. Delp, S.L., Loan, J.P., Hoy, M.G., Zajac, F.E., Topp E.L., Rosen, J.M.: An interactive graphics-based model of the lower extremity to study orthopaedic surgical procedures, IEEE Transactions on Biomedical Engineering, vol. 37, pp. 757-767, 1990. Yamaguchi G.T., Zajac F.E.: A planar model of the knee joint to characterize the knee extensor mechanism." J . Biomecl7. vol. 21. pp. 1-10. 1989. Anderson F.C., Pandy M.G.: A dynamic optimization solution for vertical jumping in three dimensions. Computer Methods in Biomechanics and Biomedical Engineering 2:201-231, 1999. Anderson F.C., Pandy M.G.: Dynamic optimization of human walking. Journal of Biomechanical Engineering 123:381-390, 2001.
  defaults: Thelen2003Muscle default: max_isometric_force=0 optimal_fiber_length=0 tendon_slack_length=0
      pennation_angle_at_optimal=0 [radians] activation_time_constant=0.01 deactivation_time_constant=0.04
      FmaxTendonStrain=0.033 FmaxMuscleStrain=0.6 KshapeActive=0.5 KshapePassive=4 Af=0.3 Flen=1.8
  BodySet:
    Body ground: mass=0 mass_center=(0 0 0) inertia_xx=0 inertia_yy=0 inertia_zz=0
    Body pelvis: mass=10.43488 mass_center=(-0.0699812 0 0) inertia_xx=0.08924215 inertia_yy=0.07561276
        inertia_zz=0.05026382 meshes=(sacrum.vtp pelvis.vtp l_pelvis.vtp)
      CustomJoint ground_pelvis: parent_body=ground location_in_parent=(0 0 0) location=(0 0 0)
        Coordinate pelvis_tilt: motion_type=rotational default_value=0 range=(-1.570796 1.570796) clamped=true
        Coordinate pelvis_list: motion_type=rotational default_value=0 range=(-1.570796 1.570796) clamped=true
        Coordinate pelvis_rotation: motion_type=rotational default_value=0 range=(-1.570796 1.570796) clamped=true
        Coordinate pelvis_tx: motion_type=translational default_value=0 range=(-5 5) clamped=true
        Coordinate pelvis_ty: motion_type=translational default_value=0 range=(-1 2) clamped=true
        Coordinate pelvis_tz: motion_type=translational default_value=0 range=(-3 3) clamped=true
        SpatialTransform:
          TransformAxis rotation1: coordinates=pelvis_tilt axis=(0 0 1) LinearFunction(coefficients=1 0)
          TransformAxis rotation2: coordinates=pelvis_list axis=(1 0 0) LinearFunction(coefficients=1 0)
          TransformAxis rotation3: coordinates=pelvis_rotation axis=(0 1 0) LinearFunction(coefficients=1 0)
          TransformAxis translation1: coordinates=pelvis_tx axis=(1 0 0) LinearFunction(coefficients=1 0)
          TransformAxis translation2: coordinates=pelvis_ty axis=(0 1 0) LinearFunction(coefficients=1 0)
          TransformAxis translation3: coordinates=pelvis_tz axis=(0 0 1) LinearFunction(coefficients=1 0)
    Body femur_r: mass=8.241399 mass_center=(0 -0.179768 0) inertia_xx=0.1326664 inertia_yy=0.03477664
        inertia_zz=0.1398992 meshes=femur_r.vtp
      CustomJoint hip_r: parent_body=pelvis location_in_parent=(-0.06998123 -0.065428 0.0826511) location=(0 0 0)
        Coordinate hip_flexion_r: motion_type=rotational default_value=0 range=(-2.094395 2.094395) clamped=true
        Coordinate hip_adduction_r: motion_type=rotational default_value=0 range=(-2.094395 2.094395) clamped=true
        Coordinate hip_rotation_r: motion_type=rotational default_value=0 range=(-2.094395 2.094395) clamped=true
        SpatialTransform: axes_held_at_zero=(translation1 translation2 translation3)
          TransformAxis rotation1: coordinates=hip_flexion_r axis=(0 0 1) LinearFunction(coefficients=1 0)
          TransformAxis rotation2: coordinates=hip_adduction_r axis=(1 0 0) LinearFunction(coefficients=1 0)
          TransformAxis rotation3: coordinates=hip_rotation_r axis=(0 1 0) LinearFunction(coefficients=1 0)
    Body tibia_r: mass=3.284988 mass_center=(0 -0.20717 0) inertia_xx=0.0549853 inertia_yy=0.00556399
        inertia_zz=0.05574899 meshes=(tibia_r.vtp fibula_r.vtp)
      CustomJoint knee_r: parent_body=femur_r location_in_parent=(0 0 0) location=(0 0 0)
        Coordinate knee_angle_r: motion_type=rotational default_value=0 range=(-2.094395 0.1745329) clamped=true
        SpatialTransform: axes_held_at_zero=(rotation2 rotation3 translation3)
          TransformAxis rotation1: coordinates=knee_angle_r axis=(0 0 1) LinearFunction(coefficients=1 0)
          TransformAxis translation1: coordinates=knee_angle_r axis=(1 0 0)
            SimmSpline: x=(-2.0944 -1.74533 -1.39626 -1.0472 -0.698132 -0.349066 -0.174533 0.197344 0.337395 0.490178 1.52146 2.0944)
                y=(-0.00338387 0.00189285 0.00434616 0.00433559 0.00224182 -0.00105746 -0.00327813 -0.00552734 -0.0057473 -0.00589428 -0.0057473 -0.00555167)
          TransformAxis translation2: coordinates=knee_angle_r axis=(0 1 0)
            SimmSpline: x=(-2.0944 -1.22173 -0.523599 -0.349066 -0.174533 0.159149 2.0944)
                y=(-0.446883 -0.431655 -0.421927 -0.420446 -0.419389 -0.417976 -0.418754)
    Body talus_r: mass=0.08860385 mass_center=(0 0 0) inertia_xx=0.00109098 inertia_yy=0.00109098 inertia_zz=0.00109098
        meshes=talus_rv.vtp
      CustomJoint ankle_r: parent_body=tibia_r location_in_parent=(0 -0.4771448 0) location=(0 0 0)
        Coordinate ankle_angle_r: motion_type=rotational default_value=0 range=(-1.570796 1.570796) clamped=true
        SpatialTransform: axes_held_at_zero=(rotation2 rotation3 translation1 translation2 translation3)
          TransformAxis rotation1: coordinates=ankle_angle_r axis=(-0.1050135 -0.1740224 0.9791263)
              LinearFunction(coefficients=1 0)
    Body calcn_r: mass=1.107548 mass_center=(0.10046 0.030138 0) inertia_xx=0.00125189 inertia_yy=0.00348741
        inertia_zz=0.00366625 meshes=foot.vtp
      CustomJoint subtalar_r: parent_body=talus_r location_in_parent=(-0.0541171 -0.04654936 0.00878834)
          location=(0 0 0)
        Coordinate subtalar_angle_r: motion_type=rotational default_value=0 range=(-1.570796 1.570796) clamped=true
            locked=true
        SpatialTransform: axes_held_at_zero=(rotation2 rotation3 translation1 translation2 translation3)
          TransformAxis rotation1: coordinates=subtalar_angle_r axis=(0.7871796 0.6047475 -0.1209495)
              LinearFunction(coefficients=1 0)
    Body toes_r: mass=0.1919159 mass_center=(0.0347591 0.00602759 -0.0175805) inertia_xx=8.942e-5 inertia_yy=0.00017884
        inertia_zz=0.00089421 meshes=bofoot.vtp
      CustomJoint mtp_r: parent_body=calcn_r location_in_parent=(0.1796223 -0.0020092 0.00108497) location=(0 0 0)
        Coordinate mtp_angle_r: motion_type=rotational default_value=0 range=(-1.570796 1.570796) clamped=true
            locked=true
        SpatialTransform: axes_held_at_zero=(rotation2 rotation3 translation1 translation2 translation3)
          TransformAxis rotation1: coordinates=mtp_angle_r axis=(-0.5809544 0 0.8139361)
              LinearFunction(coefficients=1 0)
    Body femur_l: mass=8.241399 mass_center=(0 -0.179768 0) inertia_xx=0.1326664 inertia_yy=0.03477664
        inertia_zz=0.1398992 meshes=femur_l.vtp
      CustomJoint hip_l: parent_body=pelvis location_in_parent=(-0.06998123 -0.065428 -0.0826511) location=(0 0 0)
        Coordinate hip_flexion_l: motion_type=rotational default_value=0 range=(-2.094395 2.094395) clamped=true
        Coordinate hip_adduction_l: motion_type=rotational default_value=0 range=(-2.094395 2.094395) clamped=true
        Coordinate hip_rotation_l: motion_type=rotational default_value=0 range=(-2.094395 2.094395) clamped=true
        SpatialTransform: axes_held_at_zero=(translation1 translation2 translation3)
          TransformAxis rotation1: coordinates=hip_flexion_l axis=(0 0 1) LinearFunction(coefficients=1 0)
          TransformAxis rotation2: coordinates=hip_adduction_l axis=(-1 0 0) LinearFunction(coefficients=1 0)
          TransformAxis rotation3: coordinates=hip_rotation_l axis=(0 -1 0) LinearFunction(coefficients=1 0)
    Body tibia_l: mass=3.284988 mass_center=(0 -0.20717 0) inertia_xx=0.0549853 inertia_yy=0.00556399
        inertia_zz=0.05574899 meshes=(tibia_l.vtp fibula_l.vtp)
      CustomJoint knee_l: parent_body=femur_l location_in_parent=(0 0 0) location=(0 0 0)
        Coordinate knee_angle_l: motion_type=rotational default_value=0 range=(-2.094395 0.1745329) clamped=true
        SpatialTransform: axes_held_at_zero=(rotation2 rotation3 translation3)
          TransformAxis rotation1: coordinates=knee_angle_l axis=(0 0 1) LinearFunction(coefficients=1 0)
          TransformAxis translation1: coordinates=knee_angle_l axis=(1 0 0)
            SimmSpline: x=(-2.0944 -1.74533 -1.39626 -1.0472 -0.698132 -0.349066 -0.174533 0.197344 0.337395 0.490178 1.52146 2.0944)
                y=(-0.00338387 0.00189285 0.00434616 0.00433559 0.00224182 -0.00105746 -0.00327813 -0.00552734 -0.0057473 -0.00589428 -0.0057473 -0.00555167)
          TransformAxis translation2: coordinates=knee_angle_l axis=(0 1 0)
            SimmSpline: x=(-2.0944 -1.22173 -0.523599 -0.349066 -0.174533 0.159149 2.0944)
                y=(-0.446883 -0.431655 -0.421927 -0.420446 -0.419389 -0.417976 -0.418754)
    Body talus_l: mass=0.08860385 mass_center=(0 0 0) inertia_xx=0.00109098 inertia_yy=0.00109098 inertia_zz=0.00109098
        meshes=talus_lv.vtp
      CustomJoint ankle_l: parent_body=tibia_l location_in_parent=(0 -0.4771448 0) location=(0 0 0)
        Coordinate ankle_angle_l: motion_type=rotational default_value=0 range=(-1.047198 1.047198) clamped=true
        SpatialTransform: axes_held_at_zero=(rotation2 rotation3 translation1 translation2 translation3)
          TransformAxis rotation1: coordinates=ankle_angle_l axis=(0.1050135 0.1740224 0.9791263)
              LinearFunction(coefficients=1 0)
    Body calcn_l: mass=1.107548 mass_center=(0.10046 0.030138 0) inertia_xx=0.00125189 inertia_yy=0.00348741
        inertia_zz=0.00366625 meshes=l_foot.vtp
      CustomJoint subtalar_l: parent_body=talus_l location_in_parent=(-0.0541171 -0.04654936 -0.00878834)
          location=(0 0 0)
        Coordinate subtalar_angle_l: motion_type=rotational default_value=0 range=(-1.570796 1.570796) clamped=true
            locked=true
        SpatialTransform: axes_held_at_zero=(rotation2 rotation3 translation1 translation2 translation3)
          TransformAxis rotation1: coordinates=subtalar_angle_l axis=(-0.7871796 -0.6047475 -0.1209495)
              LinearFunction(coefficients=1 0)
    Body toes_l: mass=0.1919159 mass_center=(0.0347591 0.00602759 0.0175805) inertia_xx=8.942e-5 inertia_yy=0.00017884
        inertia_zz=0.00089421 meshes=l_bofoot.vtp
      CustomJoint mtp_l: parent_body=calcn_l location_in_parent=(0.1796223 -0.0020092 -0.00108497) location=(0 0 0)
        Coordinate mtp_angle_l: motion_type=rotational default_value=0 range=(-1.047198 1.047198) clamped=true
            locked=true
        SpatialTransform: axes_held_at_zero=(rotation2 rotation3 translation1 translation2 translation3)
          TransformAxis rotation1: coordinates=mtp_angle_l axis=(0.5809544 0 0.8139361)
              LinearFunction(coefficients=1 0)
    Body torso: mass=23.7694 mass_center=(0.028929 0.338262 -0.00079922) inertia_xx=1.459837 inertia_yy=0.7479868
        inertia_zz=1.417165 meshes=(hat_spine.vtp hat_jaw.vtp hat_skull.vtp hat_ribs_scap.vtp)
      CustomJoint back: parent_body=pelvis location_in_parent=(-0.09967624 0.08067143 0) location=(0 0 0)
        Coordinate lumbar_extension: motion_type=rotational default_value=0 range=(-1.570796 1.570796) clamped=true
        Coordinate lumbar_bending: motion_type=rotational default_value=0 range=(-1.570796 1.570796) clamped=true
        Coordinate lumbar_rotation: motion_type=rotational default_value=0 range=(-1.570796 1.570796) clamped=true
        SpatialTransform: axes_held_at_zero=(translation1 translation2 translation3)
          TransformAxis rotation1: coordinates=lumbar_extension axis=(0 0 1) LinearFunction(coefficients=1 0)
          TransformAxis rotation2: coordinates=lumbar_bending axis=(1 0 0) LinearFunction(coefficients=1 0)
          TransformAxis rotation3: coordinates=lumbar_rotation axis=(0 1 0) LinearFunction(coefficients=1 0)
    Body humerus_r: mass=1.800873 mass_center=(0 -0.156277 0) inertia_xx=0.00955261 inertia_yy=0.00329536
        inertia_zz=0.01072251 meshes=humerus_rv.vtp
      CustomJoint acromial_r: parent_body=torso location_in_parent=(0.00333505 0.3927012 0.1797018) location=(0 0 0)
        Coordinate arm_flex_r: motion_type=rotational default_value=0 range=(-1.570796 1.570796) clamped=true
        Coordinate arm_add_r: motion_type=rotational default_value=0 range=(-2.094395 1.570796) clamped=true
        Coordinate arm_rot_r: motion_type=rotational default_value=0 range=(-1.570796 1.570796) clamped=true
        SpatialTransform: axes_held_at_zero=(translation1 translation2 translation3)
          TransformAxis rotation1: coordinates=arm_flex_r axis=(0 0 1) LinearFunction(coefficients=1 0)
          TransformAxis rotation2: coordinates=arm_add_r axis=(1 0 0) LinearFunction(coefficients=1 0)
          TransformAxis rotation3: coordinates=arm_rot_r axis=(0 1 0) LinearFunction(coefficients=1 0)
    Body ulna_r: mass=0.5382684 mass_center=(0 -0.129864 0) inertia_xx=0.00304691 inertia_yy=0.00063572
        inertia_zz=0.00330511 meshes=ulna_rv.vtp
      CustomJoint elbow_r: parent_body=humerus_r location_in_parent=(0.0124868 -0.2719593 -0.00911525) location=(0 0 0)
        Coordinate elbow_flex_r: motion_type=rotational default_value=0 range=(0 2.618) clamped=true
        SpatialTransform: axes_held_at_zero=(rotation2 rotation3 translation1 translation2 translation3)
          TransformAxis rotation1: coordinates=elbow_flex_r axis=(0.226047 0.022269 0.9738618)
              LinearFunction(coefficients=1 0)
    Body radius_r: mass=0.5382684 mass_center=(0 -0.129864 0) inertia_xx=0.00304691 inertia_yy=0.00063572
        inertia_zz=0.00330511 meshes=radius_rv.vtp
      CustomJoint radioulnar_r: parent_body=ulna_r location_in_parent=(-0.00724823 -0.01401483 0.02810401)
          location=(0 0 0)
        Coordinate pro_sup_r: motion_type=rotational default_value=0 range=(0 2.1) clamped=true
        SpatialTransform: axes_held_at_zero=(rotation2 rotation3 translation1 translation2 translation3)
          TransformAxis rotation1: coordinates=pro_sup_r axis=(0.05639803 0.9984065 0.001952)
              LinearFunction(coefficients=1 0)
    Body hand_r: mass=0.4053626 mass_center=(0 -0.068095 0) inertia_xx=0.00079034 inertia_yy=0.00048467
        inertia_zz=0.00118729
        meshes=(pisiform_rvs.vtp lunate_rvs.vtp scaphoid_rvs.vtp triquetrum_rvs.vtp hamate_rvs.vtp capitate_rvs.vtp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)
      CustomJoint radius_hand_r: parent_body=radius_r location_in_parent=(-0.00947863 -0.2541149 0.01466456)
          location=(0 0 0)
        Coordinate wrist_flex_r: motion_type=rotational default_value=0 range=(-1.22173 1.22173) clamped=true
            locked=true
        Coordinate wrist_dev_r: motion_type=rotational default_value=0 range=(-0.4363323 0.6108652) clamped=true
            locked=true
        SpatialTransform: axes_held_at_zero=(rotation3 translation1 translation2 translation3)
          TransformAxis rotation1: coordinates=wrist_flex_r axis=(0 0 1) LinearFunction(coefficients=1 0)
          TransformAxis rotation2: coordinates=wrist_dev_r axis=(1 0 0) LinearFunction(coefficients=1 0)
    Body humerus_l: mass=1.800873 mass_center=(0 -0.156277 0) inertia_xx=0.00955261 inertia_yy=0.00329536
        inertia_zz=0.01072251 meshes=humerus_lv.vtp
      CustomJoint acromial_l: parent_body=torso location_in_parent=(0.00333505 0.3927012 -0.1797018) location=(0 0 0)
        Coordinate arm_flex_l: motion_type=rotational default_value=0 range=(-1.570796 1.570796) clamped=true
        Coordinate arm_add_l: motion_type=rotational default_value=0 range=(-2.094395 1.570796) clamped=true
        Coordinate arm_rot_l: motion_type=rotational default_value=0 range=(-1.570796 1.570796) clamped=true
        SpatialTransform: axes_held_at_zero=(translation1 translation2 translation3)
          TransformAxis rotation1: coordinates=arm_flex_l axis=(0 0 1) LinearFunction(coefficients=1 0)
          TransformAxis rotation2: coordinates=arm_add_l axis=(-1 0 0) LinearFunction(coefficients=1 0)
          TransformAxis rotation3: coordinates=arm_rot_l axis=(0 -1 0) LinearFunction(coefficients=1 0)
    Body ulna_l: mass=0.5382684 mass_center=(0 -0.129864 0) inertia_xx=0.00304691 inertia_yy=0.00063572
        inertia_zz=0.00330511 meshes=ulna_lv.vtp
      CustomJoint elbow_l: parent_body=humerus_l location_in_parent=(0.0124868 -0.2719593 0.00911525) location=(0 0 0)
        Coordinate elbow_flex_l: motion_type=rotational default_value=0 range=(0 2.618) clamped=true
        SpatialTransform: axes_held_at_zero=(rotation2 rotation3 translation1 translation2 translation3)
          TransformAxis rotation1: coordinates=elbow_flex_l axis=(-0.226047 -0.022269 0.9738618)
              LinearFunction(coefficients=1 0)
    Body radius_l: mass=0.5382684 mass_center=(0 -0.129864 0) inertia_xx=0.00304691 inertia_yy=0.00063572
        inertia_zz=0.00330511 meshes=radius_lv.vtp
      CustomJoint radioulnar_l: parent_body=ulna_l location_in_parent=(-0.00724823 -0.01401483 -0.02810401)
          location=(0 0 0)
        Coordinate pro_sup_l: motion_type=rotational default_value=0 range=(0 2.1) clamped=true
        SpatialTransform: axes_held_at_zero=(rotation2 rotation3 translation1 translation2 translation3)
          TransformAxis rotation1: coordinates=pro_sup_l axis=(-0.05639803 -0.9984065 0.001952)
              LinearFunction(coefficients=1 0)
    Body hand_l: mass=0.4053626 mass_center=(0 -0.068095 0) inertia_xx=0.00079034 inertia_yy=0.00048467
        inertia_zz=0.00118729
        meshes=(pisiform_lvs.vtp lunate_lvs.vtp scaphoid_lvs.vtp triquetrum_lvs.vtp hamate_lvs.vtp capitate_lvs.vtp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)
      CustomJoint radius_hand_l: parent_body=radius_l location_in_parent=(-0.00947863 -0.2541149 -0.01466456)
          location=(0 0 0)
        Coordinate wrist_flex_l: motion_type=rotational default_value=0 range=(-1.22173 1.22173) clamped=true
            locked=true
        Coordinate wrist_dev_l: motion_type=rotational default_value=0 range=(-0.4363323 0.6108652) clamped=true
            locked=true
        SpatialTransform: axes_held_at_zero=(rotation3 translation1 translation2 translation3)
          TransformAxis rotation1: coordinates=wrist_flex_l axis=(0 0 1) LinearFunction(coefficients=1 0)
          TransformAxis rotation2: coordinates=wrist_dev_l axis=(-1 0 0) LinearFunction(coefficients=1 0)
  ForceSet:
    Thelen2003Muscle [values shared by the 18 below unless stated]: activation_time_constant=0.01
        deactivation_time_constant=0.04 FmaxTendonStrain=0.033 FmaxMuscleStrain=0.6 KshapeActive=0.5 KshapePassive=4
        Af=0.3 Flen=1.8
    Thelen2003Muscle semimem_r: max_isometric_force=1288 optimal_fiber_length=0.085499 tendon_slack_length=0.3836768
        pennation_angle_at_optimal=0.2617994
      PathPoint P1: pelvis (-0.117988 -0.0964791 0.070783)
      ConditionalPathPoint P2: tibia_r (-0.0386154 -0.0390482 -0.0209833) range=(-0.558505 0.174533)
          coordinate=knee_angle_r
      PathPoint P3: tibia_r (-0.0299603 -0.0529409 -0.0217156)
    Thelen2003Muscle bifemsh_r: max_isometric_force=804 optimal_fiber_length=0.1852719 tendon_slack_length=0.0953133
        pennation_angle_at_optimal=0.4014257
      PathPoint P1: femur_r (0.0052873 -0.22323 0.0247446)
      PathPoint P2: tibia_r (-0.0334001 -0.039947 0.0326567)
      PathPoint P3: tibia_r (-0.0259656 -0.0624727 0.0380606)
    Thelen2003Muscle glut_max2_r: max_isometric_force=819 optimal_fiber_length=0.1502928 tendon_slack_length=0.1298448
        pennation_angle_at_optimal=0
      PathPoint P1: pelvis (-0.133529 0.0174211 0.0557276)
      PathPoint P2: pelvis (-0.136201 -0.0514713 0.0904708)
      PathPoint P3: femur_r (-0.0450478 -0.0560454 0.0309836)
      PathPoint P4: femur_r (-0.0164964 -0.107438 0.0443076)
    Thelen2003Muscle psoas_r: max_isometric_force=1113 optimal_fiber_length=0.1004636 tendon_slack_length=0.1607417
        pennation_angle_at_optimal=0.1396263
      PathPoint P1: pelvis (-0.0640422 0.0877982 0.0286062)
      PathPoint P2: pelvis (-0.023558 -0.0564205 0.0751284)
      ConditionalPathPoint P3: pelvis (-0.0285072 -0.0796816 0.0807704) range=(-1.5708 0.785398)
          coordinate=hip_flexion_r
      PathPoint P4: femur_r (0.00169194 -0.0536132 0.00401835)
      PathPoint P5: femur_r (-0.0198802 -0.0631304 0.0109976)
    Thelen2003Muscle rect_fem_r: max_isometric_force=1169 optimal_fiber_length=0.1196597 tendon_slack_length=0.3253904
        pennation_angle_at_optimal=0.08726646
      PathPoint P1: pelvis (-0.0292001 -0.0307838 0.0958159)
      ConditionalPathPoint P2: femur_r (0.0353192 -0.426156 0.00200917) range=(-2.61799 -1.45997)
          coordinate=knee_angle_r
      MovingPathPoint P3: tibia_r (0.0685286 0.0232847 0.00155349) x_coordinate=knee_angle_r y_coordinate=knee_angle_r
          z_coordinate=knee_angle_r
        x_location: SimmSpline: x=(-2.0944 -1.99997 -1.5708 -1.45752 -1.39626 -1.0472 -0.698132 -0.526391 -0.349066 -0.174533 0 0.00017453 0.00034907 0.0279253 0.0872665 0.174533 2.0944)
            y=(0.0172887 0.0199666 0.0305241 0.0329079 0.0341342 0.040579 0.046835 0.0500338 0.0536966 0.0592879 0.0685286 0.0685389 0.0685493 0.0702494 0.0743391 0.0813404 0.0636357)
        y_location: SimmSpline: x=(-2.0944 -1.99997 -1.5708 -1.45752 -1.39626 -1.0472 -0.698132 -0.526391 -0.349066 -0.174533 0 0.00017453 0.00034907 0.0279253 0.0872665 0.174533 2.0944)
            y=(0.0259785 0.0263665 0.0278676 0.0280511 0.0280901 0.0276504 0.0268947 0.026459 0.0259874 0.0252603 0.0232847 0.0232818 0.0232789 0.0227725 0.0212778 0.0177048 -0.0747646)
        z_location: SimmSpline: x=(-2.0944 0.1745) y=(0.00155349 0.00155349)
    Thelen2003Muscle vas_int_r: max_isometric_force=1365 optimal_fiber_length=0.09153165 tendon_slack_length=0.1430839
        pennation_angle_at_optimal=0.05235988
      PathPoint P1: femur_r (0.0306663 -0.203455 0.0327813)
      PathPoint P2: femur_r (0.0354249 -0.220375 0.0301376)
      ConditionalPathPoint P3: femur_r (0.0362709 -0.426156 0.00581603) range=(-2.61799 -1.42) coordinate=knee_angle_r
      MovingPathPoint P4: tibia_r (0.0615441 0.0280653 0.00199735) x_coordinate=knee_angle_r y_coordinate=knee_angle_r
          z_coordinate=knee_angle_r
        x_location: SimmSpline: x=(-2.0944 -1.99997 -1.5708 -1.45752 -1.39626 -1.0472 -0.698132 -0.526391 -0.349066 -0.174533 0 0.00017453 0.00034907 0.0279253 0.0872665 0.174533 2.0944)
            y=(0.00918037 0.0118583 0.0224193 0.0248037 0.0260302 0.0324808 0.038778 0.0420232 0.0457803 0.05163 0.0615441 0.0615555 0.0615669 0.0634399 0.0679898 0.0759402 0.0719953)
        y_location: SimmSpline: x=(-2.0944 -1.99997 -1.5708 -1.45752 -1.39626 -1.0472 -0.698132 -0.526391 -0.349066 -0.174533 0 0.00017453 0.00034907 0.0279253 0.0872665 0.174533 2.0944)
            y=(0.0284057 0.0287937 0.0303069 0.0304925 0.0305318 0.0301115 0.0294872 0.0291916 0.0289823 0.028865 0.0280653 0.028064 0.0280626 0.0277993 0.0268745 0.0242221 -0.0760886)
        z_location: SimmSpline: x=(-2.0944 2.0944) y=(0.00199735 0.00199735)
    Thelen2003Muscle med_gas_r: max_isometric_force=1558 optimal_fiber_length=0.06695604 tendon_slack_length=0.4352143
        pennation_angle_at_optimal=0.296706
      PathPoint P1: femur_r (-0.0200917 -0.415476 -0.0248503)
      ConditionalPathPoint P2: femur_r (-0.0317238 -0.42531 -0.0272825) range=(-0.785398 0.174533)
          coordinate=knee_angle_r
      PathPoint P3: calcn_r (0 0.0311426 -0.00532438)
    Thelen2003Muscle soleus_r: max_isometric_force=3549 optimal_fiber_length=0.0560322 tendon_slack_length=0.280161
        pennation_angle_at_optimal=0.4363323
      PathPoint P1: tibia_r (-0.00266313 -0.170108 0.00787844)
      PathPoint P2: calcn_r (0 0.0311426 -0.00532438)
    Thelen2003Muscle tib_ant_r: max_isometric_force=905 optimal_fiber_length=0.1074971 tendon_slack_length=0.2446108
        pennation_angle_at_optimal=0.08726646
      PathPoint P1: tibia_r (0.0198625 -0.180205 0.0127609)
      PathPoint P2: tibia_r (0.0365071 -0.438418 -0.0196406)
      PathPoint P3: calcn_r (0.117136 0.0178819 -0.0306403)
    Thelen2003Muscle semimem_l: max_isometric_force=1288 optimal_fiber_length=0.085499 tendon_slack_length=0.3836768
        pennation_angle_at_optimal=0.2617994
      PathPoint P1: pelvis (-0.117988 -0.0964791 -0.070783)
      ConditionalPathPoint P2: tibia_l (-0.0386154 -0.0390482 0.0209833) range=(-0.558505 0.174533)
          coordinate=knee_angle_l
      PathPoint P3: tibia_l (-0.0299603 -0.0529409 0.0217156)
    Thelen2003Muscle bifemsh_l: max_isometric_force=804 optimal_fiber_length=0.1852719 tendon_slack_length=0.0953133
        pennation_angle_at_optimal=0.4014257
      PathPoint P1: femur_l (0.0052873 -0.22323 -0.0247446)
      PathPoint P2: tibia_l (-0.0334001 -0.039947 -0.0326567)
      PathPoint P3: tibia_l (-0.0259656 -0.0624727 -0.0380606)
    Thelen2003Muscle glut_max2_l: max_isometric_force=819 optimal_fiber_length=0.1502928 tendon_slack_length=0.1298448
        pennation_angle_at_optimal=0
      PathPoint P1: pelvis (-0.133529 0.0174211 -0.0557276)
      PathPoint P2: pelvis (-0.136201 -0.0514713 -0.0904708)
      PathPoint P3: femur_l (-0.0450478 -0.0560454 -0.0309836)
      PathPoint P4: femur_l (-0.0164964 -0.107438 -0.0443076)
    Thelen2003Muscle psoas_l: max_isometric_force=1113 optimal_fiber_length=0.1004636 tendon_slack_length=0.1607417
        pennation_angle_at_optimal=0.1396263
      PathPoint P1: pelvis (-0.0640422 0.0877982 -0.0286062)
      PathPoint P2: pelvis (-0.023558 -0.0564205 -0.0751284)
      ConditionalPathPoint P3: pelvis (-0.0285072 -0.0796816 -0.0807704) range=(-1.5708 0.785398)
          coordinate=hip_flexion_l
      PathPoint P4: femur_l (0.00169194 -0.0536132 -0.00401835)
      PathPoint P5: femur_l (-0.0198802 -0.0631304 -0.0109976)
    Thelen2003Muscle rect_fem_l: max_isometric_force=1169 optimal_fiber_length=0.1196597 tendon_slack_length=0.3253904
        pennation_angle_at_optimal=0.08726646
      PathPoint P1: pelvis (-0.0292001 -0.0307838 -0.0958159)
      ConditionalPathPoint P2: femur_l (0.0353192 -0.426156 -0.00200917) range=(-2.61799 -1.45997)
          coordinate=knee_angle_l
      MovingPathPoint P3: tibia_l (0.0685286 0.0232847 -0.00155349) x_coordinate=knee_angle_l y_coordinate=knee_angle_l
          z_coordinate=knee_angle_l
        x_location: SimmSpline: x=(-2.0944 -1.99997 -1.5708 -1.45752 -1.39626 -1.0472 -0.698132 -0.526391 -0.349066 -0.174533 0 0.00017453 0.00034907 0.0279253 0.0872665 0.174533 2.0944)
            y=(0.0172887 0.0199666 0.0305241 0.0329079 0.0341342 0.040579 0.046835 0.0500338 0.0536966 0.0592879 0.0685286 0.0685389 0.0685493 0.0702494 0.0743391 0.0813404 0.0636357)
        y_location: SimmSpline: x=(-2.0944 -1.99997 -1.5708 -1.45752 -1.39626 -1.0472 -0.698132 -0.526391 -0.349066 -0.174533 0 0.00017453 0.00034907 0.0279253 0.0872665 0.174533 2.0944)
            y=(0.0259785 0.0263665 0.0278676 0.0280511 0.0280901 0.0276504 0.0268947 0.026459 0.0259874 0.0252603 0.0232847 0.0232818 0.0232789 0.0227725 0.0212778 0.0177048 -0.0747646)
        z_location: SimmSpline: x=(-2.0944 0.1745) y=(-0.00155349 -0.00155349)
    Thelen2003Muscle vas_int_l: max_isometric_force=1365 optimal_fiber_length=0.09171956 tendon_slack_length=0.1433777
        pennation_angle_at_optimal=0.05235988
      PathPoint P1: femur_l (0.0306663 -0.203455 -0.0327813)
      PathPoint P2: femur_l (0.0354249 -0.220375 -0.0301376)
      ConditionalPathPoint P3: femur_l (0.0362709 -0.426156 -0.00581603) range=(-2.61799 -1.42) coordinate=knee_angle_l
      MovingPathPoint P4: tibia_l (0.0685286 0.0232847 -0.00155349) x_coordinate=knee_angle_l y_coordinate=knee_angle_l
          z_coordinate=knee_angle_l
        x_location: SimmSpline: x=(-2.0944 -1.99997 -1.5708 -1.45752 -1.39626 -1.0472 -0.698132 -0.526391 -0.349066 -0.174533 0 0.00017453 0.00034907 0.0279253 0.0872665 0.174533 2.0944)
            y=(0.0172887 0.0199666 0.0305241 0.0329079 0.0341342 0.040579 0.046835 0.0500338 0.0536966 0.0592879 0.0685286 0.0685389 0.0685493 0.0702494 0.0743391 0.0813404 0.0636357)
        y_location: SimmSpline: x=(-2.0944 -1.99997 -1.5708 -1.45752 -1.39626 -1.0472 -0.698132 -0.526391 -0.349066 -0.174533 0 0.00017453 0.00034907 0.0279253 0.0872665 0.174533 2.0944)
            y=(0.0259785 0.0263665 0.0278676 0.0280511 0.0280901 0.0276504 0.0268947 0.026459 0.0259874 0.0252603 0.0232847 0.0232818 0.0232789 0.0227725 0.0212778 0.0177048 -0.0747646)
        z_location: SimmSpline: x=(-2.0944 0.1745) y=(-0.00155349 -0.00155349)
    Thelen2003Muscle med_gas_l: max_isometric_force=1558 optimal_fiber_length=0.06695604 tendon_slack_length=0.4352143
        pennation_angle_at_optimal=0.296706
      PathPoint P1: femur_l (-0.0200917 -0.415476 0.0248503)
      ConditionalPathPoint P2: femur_l (-0.0317238 -0.42531 0.0272825) range=(-0.785398 0.174533)
          coordinate=knee_angle_l
      PathPoint P3: calcn_l (0 0.0311426 0.00532438)
    Thelen2003Muscle soleus_l: max_isometric_force=3549 optimal_fiber_length=0.0560322 tendon_slack_length=0.280161
        pennation_angle_at_optimal=0.4363323
      PathPoint P1: tibia_l (-0.00266313 -0.170108 -0.00787844)
      PathPoint P2: calcn_l (0 0.0311426 0.00532438)
    Thelen2003Muscle tib_ant_l: max_isometric_force=905 optimal_fiber_length=0.1074971 tendon_slack_length=0.2446108
        pennation_angle_at_optimal=0.08726646
      PathPoint P1: tibia_l (0.0198625 -0.180205 -0.0127609)
      PathPoint P2: tibia_l (0.0365071 -0.438418 0.0196406)
      PathPoint P3: calcn_l (0.117136 0.0178819 0.0306403)
  MarkerSet:
    Marker Sternum: torso (0.136648 0.343136 -0.00732331)
    Marker R.Acromium: torso (0.00617457 0.46045 0.17845)
    Marker L.Acromium: torso (-0.0125411 0.460228 -0.162742)
    Marker R.Bicep: humerus_r (-0.0342581 -0.174387 -0.00212153)
    Marker R.Elbow: humerus_r (-0.0445698 -0.276606 -0.0183925)
    Marker R.Wrist.Med: radius_r (-0.0424441 -0.23116 -0.00277419)
    Marker R.Wrist.Lat: radius_r (-0.0144014 -0.239025 0.0580273)
    Marker L.Bicep: humerus_l (-0.0460482 -0.18788 -0.00252545)
    Marker L.Elbow: humerus_l (-0.041748 -0.280851 0.00485869)
    Marker L.Wrist.Med: radius_l (-0.0380602 -0.237369 0.00721787)
    Marker L.Wrist.Lat: radius_l (-0.012549 -0.235259 -0.061855)
    Marker R.ASIS: pelvis (0.0269888 0.0287557 0.129009)
    Marker L.ASIS: pelvis (0.0209185 0.0274048 -0.124291)
    Marker V.Sacral: pelvis (-0.173943 0.0424138 -0.00261451)
    Marker R.Thigh.Upper: femur_r (0.034004 -0.207639 0.0875705)
    Marker R.Thigh.Front: femur_r (0.102695 -0.26325 0.0224228)
    Marker R.Thigh.Rear: femur_r (0.00910369 -0.304864 0.0801931)
    Marker R.Knee.Lat: femur_r (-0.00027239 -0.428593 0.0614416)
    Marker R.Knee.Med: femur_r (0.0022834 -0.439904 -0.0665342)
    Marker R.Shank.Upper: tibia_r (0.0053077 -0.0928878 0.0694078)
    Marker R.Shank.Front: tibia_r (0.0591859 -0.157273 0.0206148)
    Marker R.Shank.Rear: tibia_r (0.00102039 -0.176602 0.0755271)
    Marker R.Ankle.Lat: tibia_r (-0.00844284 -0.453065 0.0514343)
    Marker R.Ankle.Med: tibia_r (0.00591318 -0.437285 -0.0323562)
    Marker R.Heel: calcn_r (-0.0182009 0.0374186 0.00052561)
    Marker R.Toe.Tip: calcn_r (0.262292 0.05254 -0.00731354)
    Marker R.Midfoot.Lat: calcn_r (0.0984377 0.0349266 0.061552)
    Marker R.Midfoot.Sup: calcn_r (0.123325 0.0487657 -0.0381416)
    Marker R.Toe.Lat: calcn_r (0.194114 0.0275546 0.0706935)
    Marker R.Toe.Med: calcn_r (0.195448 0.0228226 -0.0423825)
    Marker L.Thigh.Upper: femur_l (0.0441969 -0.202094 -0.0907451)
    Marker L.Thigh.Front: femur_l (0.103631 -0.26785 -0.0106771)
    Marker L.Thigh.Rear: femur_l (0.0303494 -0.331956 -0.0743744)
    Marker L.Knee.Lat: femur_l (-0.00922092 -0.420911 -0.0587771)
    Marker L.Knee.Med: femur_l (0.0111334 -0.436683 0.0606911)
    Marker L.Shank.Upper: tibia_l (-0.0140691 -0.102493 -0.0744164)
    Marker L.Shank.Front: tibia_l (0.0567464 -0.171042 -0.0273379)
    Marker L.Shank.Rear: tibia_l (-0.0266801 -0.173397 -0.0787086)
    Marker L.Ankle.Lat: tibia_l (-0.00771981 -0.450863 -0.0496019)
    Marker L.Ankle.Med: tibia_l (0.00683211 -0.439151 0.0405509)
    Marker L.Heel: calcn_l (-0.020287 0.0329769 -0.00924843)
    Marker L.Toe.Tip: calcn_l (0.259875 0.0594872 0.0136796)
    Marker L.Midfoot.Lat: calcn_l (0.112529 0.029316 -0.0580435)
    Marker L.Midfoot.Sup: calcn_l (0.117179 0.0472712 0.04394)
    Marker L.Toe.Lat: calcn_l (0.192778 0.0211198 -0.0690622)
    Marker L.Toe.Med: calcn_l (0.194435 0.0327455 0.0430287)
