# OpenSim document version 30000
AnalyzeTool inverse_kinematics:
  model_file: C:\Users\Nick\Projects\ExoTopology\exotopology\optctrlmuscle\Data\WalkingData\subject01.osim
  replace_force_set: false
  results_directory: C:\Users\Nick\Projects\ExoTopology\exotopology\optctrlmuscle\Examples\SoftExosuitDesign\ExoTopology\Results\MuscleAnalysis
  output_precision: 8
  initial_time: 0.7
  final_time: 1.41
  solve_for_equilibrium_for_auxiliary_states: false
  maximum_number_of_integrator_steps: 20000
  maximum_integrator_step_size: 1
  minimum_integrator_step_size: 1e-8
  integrator_error_tolerance: 1e-5
  coordinates_file: C:\Users\Nick\Projects\ExoTopology\exotopology\optctrlmuscle\Data\WalkingData\inverse_kinematics.mot
  lowpass_cutoff_frequency_for_coordinates: -1
  AnalysisSet Analyses:
    MuscleAnalysis: start_time=0 end_time=10 step_interval=1 in_degrees=true muscle_list=all
        moment_arm_coordinate_list=all compute_moments=true
